d/dx(y(x)) - y(x) - x^3 laplace, x → ((s^5 - s^4)*integral(y(x)*e^(-(s*x)), x = 0 .. ∞) - (y(0)*s^4 + 6))/s^4 substitute, integral(y(x)*e^(-(s*x)), x = 0 .. ∞) == Y_0; solve, Y_0; invlaplace → (y(0) + 6)*e^t - (t^3 + 3*t^2 + 6*t + 6)
# y 1 için x 1
1 == (y_0 + 6)*e^t - (t^3 + 3*t^2 + 6*t + 6) substitute, t == 1; solve, y_0 → (-(6*e) + 17)/e
y(t) := ((-(6*e) + 17)/e + 6)*e^t - (t^3 + 3*t^2 + 6*t + 6) simplify → 17*e^(t - 1) - (t^3 + 3*t^2 + 6*t + 6)
y(x) := 17*e^(x - 1) - (x^3 + 3*x^2 + 6*x + 6)
